// SBML level 2 version 4
// dcterms:bibliographicCitation: urn:miriam:pubmed:24131053

model Makin2013___Blood_coagulation_cascade_model()
  // Makin2013 - Blood coagulation cascade model
  // Mathematical model of the blood coagulation system including lipid binding sites, meizothrombin, thrombomodulin, cleaved and light peptide chain Va species and Heparin.
  // isVersionOf GO:0007596
  // isDescribedBy pubmed:24131053

  // Compartments:
  compartment compartment = 1;

  // Species:
  species II in compartment = 1400;
  species II_L in compartment = 0;
  species LBS in compartment = 0;
  species mIIa in compartment = 0;
  species mIIa_L in compartment = 0;
  species V in compartment = 20;
  species V_L in compartment = 0;
  species Va in compartment = 0;
  species Va_L in compartment = 0;
  species VII in compartment = 10;
  species VII_L in compartment = 0;
  species VIIa in compartment = 0.1;
  species VIIa_L in compartment = 0;
  species VIII in compartment = 0.7;
  species VIII_L in compartment = 0;
  species VIIIa in compartment = 0;
  species VIIIa_L in compartment = 0;
  species IX in compartment = 90;
  species IX_L in compartment = 0;
  species IXa in compartment = 0;
  species IXa_L in compartment = 0;
  species X in compartment = 170;
  species X_L in compartment = 0;
  species Xa in compartment = 0;
  species Xa_L in compartment = 0;
  species APC in compartment = 0;
  species APC_L in compartment = 0;
  species PS in compartment = 300;
  species PS_L in compartment = 0;
  species VIIIa_i in compartment = 0;
  species VIIIa_i_L in compartment = 0; VIIIa_i_L is "VIIIa_i,L";
  species PC in compartment = 60;
  species PC_L in compartment = 3396;
  species TF_VIIa_L in compartment = 0; TF_VIIa_L is "TF:VIIa_L";
  species TF_L in compartment = 0.005;
  species TF_VII_L in compartment = 0; TF_VII_L is "TF:VII_L";
  species TF_VIIa_IX_L in compartment = 0; TF_VIIa_IX_L is "TF:VIIa:IX_L";
  species TF_VIIa_X_L in compartment = 0; TF_VIIa_X_L is "TF:VIIa:X_L";
  species TF_VIIa_Xa_L in compartment = 0; TF_VIIa_Xa_L is "TF:VIIa:Xa_L";
  species IXa_VIIIa_L in compartment = 0; IXa_VIIIa_L is "IXa:VIIIa_L";
  species IXa_VIIIa_X_L in compartment = 0; IXa_VIIIa_X_L is "IXa:VIIIa:X_L";
  species Xa_Va_L in compartment = 0; Xa_Va_L is "Xa:Va_L";
  species V_Xa_L in compartment = 0; V_Xa_L is "V:Xa_L";
  species VIII_Xa_L in compartment = 0; VIII_Xa_L is "VIII:Xa_L";
  species IIa in compartment = 0;
  species V_IIa_L in compartment = 0; V_IIa_L is "V:IIa_L";
  species VIII_IIa_L in compartment = 0; VIII_IIa_L is "VIII:IIa_L";
  species Xa_Va_II_L in compartment = 0; Xa_Va_II_L is "Xa:Va:II_L";
  species Xa_Va_mIIa_L in compartment = 0; Xa_Va_mIIa_L is "Xa:Va:mIIa_L";
  species XI in compartment = 30;
  species XI_IIa in compartment = 0; XI_IIa is "XI:IIa";
  species APC_PS_VIIIa_L in compartment = 0; APC_PS_VIIIa_L is "APC:PS:VIIIa_L";
  species APC_PS_L in compartment = 0; APC_PS_L is "APC:PS_L";
  species TFPI in compartment = 2.5;
  species TFPI_Xa in compartment = 0; TFPI_Xa is "TFPI:Xa";
  species TFPI_Xa_TF_VIIa_L in compartment = 0; TFPI_Xa_TF_VIIa_L is "TFPI:Xa:TF:VIIa_L";
  species AT in compartment = 3400;
  species IXa_AT in compartment = 0; IXa_AT is "IXa:AT";
  species Xa_AT in compartment = 0; Xa_AT is "Xa:AT";
  species IIa_AT in compartment = 0; IIa_AT is "IIa:AT";
  species V_mIIa_L in compartment = 0; V_mIIa_L is "V:mIIa_L";
  species VIII_mIIa_L in compartment = 0; VIII_mIIa_L is "VIII:mIIa_L";
  species IIa_Tm_L in compartment = 0; IIa_Tm_L is "IIa:Tm_L";
  species Tm_L in compartment = 1;
  species IIa_Tm_PC_L in compartment = 0; IIa_Tm_PC_L is "IIa:Tm:PC_L";
  species mIIa_AT in compartment = 0; mIIa_AT is "mIIa:AT";
  species XIa in compartment = 0;
  species XIa_IX_L in compartment = 0; XIa_IX_L is "XIa:IX_L";
  species Xa_L_0 in compartment = 0; Xa_L_0 is "Xa:L";
  species VII_Xa_L in compartment = 0; VII_Xa_L is "VII:Xa_L";
  species HC in compartment = 0;
  species LC_L in compartment = 0;
  species HC5 in compartment = 0;
  species Va5_L in compartment = 0;
  species HC3 in compartment = 0;
  species Va3_L in compartment = 0;
  species HC53 in compartment = 0;
  species Va53_L in compartment = 0;
  species HC36 in compartment = 0;
  species Va36_L in compartment = 0;
  species HC56 in compartment = 0;
  species Va56_L in compartment = 0;
  species HC536 in compartment = 0;
  species Va536_L in compartment = 0;
  species LC_APC_PS_L in compartment = 0; LC_APC_PS_L is "LC:APC:PS_L";
  species Va_APC_PS_L in compartment = 0; Va_APC_PS_L is "Va:APC:PS_L";
  species Va5_APC_PS_L in compartment = 0; Va5_APC_PS_L is "Va5:APC:PS_L";
  species Va3_APC_PS_L in compartment = 0; Va3_APC_PS_L is "Va3:APC:PS_L";
  species Va36_APC_PS_L in compartment = 0; Va36_APC_PS_L is "Va36:APC:PS_L";
  species Va56_L_APC_PS_L in compartment = 0; Va56_L_APC_PS_L is "Va56_L:APC:PS_L";
  species Va536_APC_PS_L in compartment = 0; Va536_APC_PS_L is "Va536:APC:PS_L";
  species VaLC_APC_PS_L in compartment = 0; VaLC_APC_PS_L is "VaLC:APC:PS_L";
  species VaLC_L in compartment = 0;
  species VaA3 in compartment = 0;
  species VaA53 in compartment = 0;
  species VaA36 in compartment = 0;
  species VaA356 in compartment = 0;
  species Va53_APC_PS_L in compartment = 0; Va53_APC_PS_L is "Va53:APC:PS_L";
  species Va56_APC_PS_L in compartment = 0; Va56_APC_PS_L is "Va56:APC:PS_L";
  species Hep in compartment = 0;
  species Hep_IIa in compartment = 0; Hep_IIa is "Hep:IIa";
  species Hep_AT in compartment = 0; Hep_AT is "Hep:AT";
  species Hep_AT_IIa in compartment = 0; Hep_AT_IIa is "Hep:AT:IIa";

  // Parameters:
  k01_kon = 0.0043;
  k01_koff = 1;
  k02_kon = 0.05;
  k02_koff = 0.475;
  k03_kon = 0.05;
  k03_koff = 0.145;
  k04_kon = 0.057;
  k04_koff = 0.17;
  k05_kon = 0.05;
  k05_koff = 0.66;
  k06_kon = 0.05;
  k06_koff = 0.227;
  k07_kon = 0.05;
  k07_koff = 0.1;
  k08_kon = 0.05;
  k08_koff = 0.335;
  k09_kon = 0.05;
  k09_koff = 0.115;
  k10_kon = 0.05;
  k10_koff = 0.115;
  k11_kon = 0.01;
  k11_koff = 1.9;
  k12_kon = 0.029;
  k12_koff = 3.3;
  k13_kon = 0.05;
  k13_koff = 3.5;
  k14_kon = 0.05;
  k14_koff = 0.2;
  k15_kon = 0.05;
  k15_koff = 0.335;
  k16_kon = 0.05;
  k16_koff = 11.5;
  k17_kon = 0.5;
  k17_koff = 0.005;
  k18_kon = 0.005;
  k18_koff = 0.005;
  k19_kon = 0.01;
  k19_koff = 2.09;
  k19_kcat = 0.34;
  k20_kon = 0.1;
  k20_koff = 32.5;
  k20_kcat = 1.5;
  k21_koff = 1;
  k22_kon = 0.05;
  k22_koff = 44.8;
  k22_kcat = 15.2;
  k23_kon = 0.1;
  k23_koff = 0.2;
  k24_kon = 1;
  k24_koff = 1;
  k25_kon = 0.1;
  k25_koff = 10.7;
  k25_kcat = 8.3;
  k26_kon = 0.1;
  k26_koff = 1;
  k26_kcat = 0.043;
  k27_kon = 0.1;
  k27_koff = 2.1;
  k27_kcat = 0.023;
  k28_kon = 0.1;
  k28_koff = 6.94;
  k28_kcat = 0.23;
  k29_kon = 0.1;
  k29_koff = 13.8;
  k29_kcat = 0.9;
  k30_kon = 0.1;
  k30_koff = 100;
  k31_kon = 0.1;
  k31_koff = 66;
  k32_kcat = 13;
  k33_kcat = 15;
  k34_kon = 0.05;
  k34_koff = 44.8;
  k34_kcat = 15.2;
  k35_kon = 0.1;
  k35_koff = 10;
  k35_kcat = 1.43;
  k36_kon = 0.1;
  k36_koff = 1.6;
  k36_kcat = 0.4;
  k37_kon = 0.016;
  k37_koff = 0.000333;
  k38_kon = 0.01;
  k38_koff = 0.0011;
  k39_kon = 4.9e-7;
  k40_kon = 2.3e-6;
  k41_kon = 6.83e-5;
  k42_kon = 0.1;
  k42_koff = 6.94;
  k42_kcat = 1.035;
  k43_kon = 0.1;
  k43_koff = 13.8;
  k43_kcat = 0.9;
  k44_kon = 1;
  k44_koff = 0.5;
  k45_kon = 0.1;
  k45_koff = 6.4;
  k45_kcat = 3.6;
  k46_kon = 6.83e-6;
  k47_kon = 0.1;
  k47_koff = 0.5;
  k48_kon = 0.01;
  k48_koff = 1.417;
  k48_kcat = 0.183;
  k49_kon = 2.63e-6;
  k49_koff = 1.72e-5;
  k50_kon = 2.63e-6;
  k50_koff = 1.72e-5;
  k51_kon = 2.63e-6;
  k51_koff = 1.72e-5;
  k52_kon = 2.63e-6;
  k52_koff = 1.72e-5;
  k53_kon = 2.63e-6;
  k53_koff = 1.72e-5;
  k54_kon = 2.63e-6;
  k54_koff = 1.72e-5;
  k55_kon = 2.63e-6;
  k55_koff = 1.72e-5;
  k56_kon = 2.63e-6;
  k56_koff = 1.72e-5;
  k57_kon = 0.1;
  k57_koff = 0.7;
  k58_kon = 0.1;
  k58_koff = 0.7;
  k59_kon = 0.1;
  k59_koff = 0.7;
  k60_kon = 0.1;
  k60_koff = 0.7;
  k61_kon = 0.1;
  k61_koff = 0.7;
  k62_kon = 0.1;
  k62_koff = 0.7;
  k63_kon = 0.1;
  k63_koff = 0.7;
  k64_kon = 0.1;
  k64_koff = 0.7;
  k65_kon = 2.57e-6;
  k65_koff = 0.028;
  k66_kon = 2.57e-6;
  k66_koff = 0.028;
  k67_kon = 2.57e-6;
  k67_koff = 0.028;
  k68_kon = 2.57e-6;
  k68_koff = 0.028;
  k69_kon = 2.57e-6;
  k69_koff = 0.028;
  k70_kon = 2.57e-6;
  k70_koff = 0.028;
  k71_kon = 2.57e-6;
  k71_koff = 0.028;
  k72_kon = 2.57e-6;
  k72_koff = 0.028;
  k73_kcat = 0.192;
  k74_kcat = 0.192;
  k75_kcat = 0.00052;
  k76_kcat = 0.00052;
  k77_kcat = 0.00052;
  k78_kcat = 0.192;
  k79_kcat = 1;
  k80_kcat = 1;
  k81_kcat = 1;
  k82_kon = 0.1;
  k82_koff = 3000;
  k83_kon = 0.1;
  k83_koff = 20;
  k84_kon = 0.1;
  k84_koff = 2;
  k85_kon = 0.1;
  k85_koff = 300;
  k86_kon = 0.1;
  k86_koff = 0.06;
  k87_cleavage = 5;

  // Reactions:
  R01: II + LBS -> II_L; compartment*(k01_kon*II*LBS - k01_koff*II_L);
  R02: mIIa + LBS -> mIIa_L; compartment*(k02_kon*mIIa*LBS - k02_koff*mIIa_L);
  R03: V + LBS -> V_L; compartment*(k03_kon*V*LBS - k03_koff*V_L);
  R04: Va + LBS -> Va_L; compartment*(k04_kon*Va*LBS - k04_koff*Va_L);
  R05: VII + LBS -> VII_L; compartment*(k05_kon*VII*LBS - k05_koff*VII_L);
  R06: VIIa + LBS -> VIIa_L; compartment*(k06_kon*VIIa*LBS - k06_koff*VIIa_L);
  R07: VIII + LBS -> VIII_L; compartment*(k07_kon*VIII*LBS - k07_koff*VIII_L);
  R08: VIIIa + LBS -> VIIIa_L; compartment*(k08_kon*VIIIa*LBS - k08_koff*VIIIa_L);
  R09: IX + LBS -> IX_L; compartment*(k09_kon*IX*LBS - k09_koff*IX_L);
  R10: IXa + LBS -> IXa_L; compartment*(k10_kon*IXa*LBS - k10_koff*IXa_L);
  R11: X + LBS -> X_L; compartment*(k11_kon*X*LBS - k11_koff*X_L);
  R12: Xa + LBS -> Xa_L; compartment*(k12_kon*Xa*LBS - k12_koff*Xa_L);
  R13: APC + LBS -> APC_L; compartment*(k13_kon*APC*LBS - k13_koff*APC_L);
  R14: PS + LBS -> PS_L; compartment*(k14_kon*PS*LBS - k14_koff*PS_L);
  R15: VIIIa_i + LBS -> VIIIa_i_L; compartment*(k15_kon*VIIIa_i*LBS - k15_koff*VIIIa_i_L);
  R16: PC + LBS -> PC_L; compartment*(k16_kon*PC*LBS - k16_koff*PC_L);
  R17: TF_L + VIIa_L -> TF_VIIa_L; compartment*(k17_kon*TF_L*VIIa_L - k17_koff*TF_VIIa_L);
  R18: TF_L + VII -> TF_VII_L; compartment*(k18_kon*TF_L*VII - k18_koff*TF_VII_L);
  R19a: TF_VIIa_L + IX_L -> TF_VIIa_IX_L; compartment*(k19_kon*TF_VIIa_L*IX_L - k19_koff*TF_VIIa_IX_L);
  R20a: TF_VIIa_L + X_L -> TF_VIIa_X_L; compartment*(k20_kon*TF_VIIa_L*X_L - k20_koff*TF_VIIa_X_L);
  R21: TF_VIIa_Xa_L => TF_VIIa_L + Xa_L; compartment*k21_koff*TF_VIIa_Xa_L;
  R22a: TF_VII_L + Xa_L -> TF_VIIa_Xa_L; compartment*(k22_kon*TF_VII_L*Xa_L - k22_koff*TF_VIIa_Xa_L);
  R23: IXa_L + VIIIa_L -> IXa_VIIIa_L; compartment*(k23_kon*IXa_L*VIIIa_L - k23_koff*IXa_VIIIa_L);
  R24: Xa_L + Va_L -> Xa_Va_L; compartment*(k24_kon*Xa_L*Va_L - k24_koff*Xa_Va_L);
  R25a: IXa_VIIIa_L + X_L -> IXa_VIIIa_X_L; compartment*(k25_kon*IXa_VIIIa_L*X_L - k25_koff*IXa_VIIIa_X_L);
  R26a: V_L + Xa_L -> V_Xa_L; compartment*(k26_kon*V_L*Xa_L - k26_koff*V_Xa_L);
  R27a: VIII_L + Xa_L -> VIII_Xa_L; compartment*(k27_kon*VIII_L*Xa_L - k27_koff*VIII_Xa_L);
  R28a: V_L + IIa -> V_IIa_L; compartment*(k28_kon*V_L*IIa - k28_koff*V_IIa_L);
  R29a: VIII_L + IIa -> VIII_IIa_L; compartment*(k29_kon*VIII_L*IIa - k29_koff*VIII_IIa_L);
  R30: Xa_Va_L + II_L -> Xa_Va_II_L; compartment*(k30_kon*Xa_Va_L*II_L - k30_koff*Xa_Va_II_L);
  R31: Xa_Va_L + mIIa_L -> Xa_Va_mIIa_L; compartment*(k31_kon*Xa_Va_L*mIIa_L - k31_koff*Xa_Va_mIIa_L);
  R32: Xa_Va_II_L => Xa_Va_mIIa_L; compartment*k32_kcat*Xa_Va_II_L;
  R33: Xa_Va_mIIa_L => Xa_Va_L + IIa + LBS; compartment*k33_kcat*Xa_Va_mIIa_L;
  R34a: VII_L + Xa_L -> VII_Xa_L; compartment*(k34_kon*VII_L*Xa_L - k34_koff*VII_Xa_L);
  R35a: XI + IIa -> XI_IIa; compartment*(k35_kon*XI*IIa - k35_koff*XI_IIa);
  R36a: APC_PS_L + VIIIa_L -> APC_PS_VIIIa_L; compartment*(k36_kon*APC_PS_L*VIIIa_L - k36_koff*APC_PS_VIIIa_L);
  R37: TFPI + Xa -> TFPI_Xa; compartment*(k37_kon*TFPI*Xa - k37_koff*TFPI_Xa);
  R38: TFPI_Xa + TF_VIIa_L -> TFPI_Xa_TF_VIIa_L; compartment*(k38_kon*TFPI_Xa*TF_VIIa_L - k38_koff*TFPI_Xa_TF_VIIa_L);
  R39: IXa + AT => IXa_AT; compartment*k39_kon*IXa*AT;
  R40: Xa + AT => Xa_AT; compartment*k40_kon*Xa*AT;
  R41: IIa + AT => IIa_AT; compartment*k41_kon*IIa*AT;
  R42a: V_L + mIIa_L -> V_mIIa_L; compartment*(k42_kon*V_L*mIIa_L - k42_koff*V_mIIa_L);
  R43a: VIII_L + mIIa_L -> VIII_mIIa_L; compartment*(k43_kon*VIII_L*mIIa_L - k43_koff*VIII_mIIa_L);
  R44: IIa + Tm_L -> IIa_Tm_L; compartment*(k44_kon*IIa*Tm_L - k44_koff*IIa_Tm_L);
  R45a: IIa_Tm_L + PC_L -> IIa_Tm_PC_L; compartment*(k45_kon*IIa_Tm_L*PC_L - k45_koff*IIa_Tm_PC_L);
  R46: mIIa + AT => mIIa_AT; compartment*k46_kon*mIIa*AT;
  R47: APC_L + PS_L -> APC_PS_L; compartment*(k47_kon*APC_L*PS_L - k47_koff*APC_PS_L);
  R48a: XIa + IX_L -> XIa_IX_L; compartment*(k48_kon*XIa*IX_L - k48_koff*XIa_IX_L);
  R49: LC_L + HC -> Va_L; compartment*(k49_kon*LC_L*HC - k49_koff*Va_L);
  R50: LC_L + HC5 -> Va5_L; compartment*(k50_kon*LC_L*HC5 - k50_koff*Va5_L);
  R51: LC_L + HC3 -> Va3_L; compartment*(k51_kon*LC_L*HC3 - k51_koff*Va3_L);
  R52: LC_L + HC53 -> Va53_L; compartment*(k52_kon*LC_L*HC53 - k52_koff*Va53_L);
  R53: LC_L + HC36 -> Va36_L; compartment*(k53_kon*LC_L*HC36 - k53_koff*Va36_L);
  R54: LC_L + HC56 -> Va56_L; compartment*(k54_kon*LC_L*HC56 - k54_koff*Va56_L);
  R55: LC_L + HC536 -> Va536_L; compartment*(k55_kon*LC_L*HC536 - k55_koff*Va536_L);
  R56: LC_L + APC_PS_L -> LC_APC_PS_L; compartment*(k56_kon*LC_L*APC_PS_L - k56_koff*LC_APC_PS_L);
  R57: Va_L + APC_PS_L -> Va_APC_PS_L; compartment*(k57_kon*Va_L*APC_PS_L - k57_koff*Va_APC_PS_L);
  R58: Va5_L + APC_PS_L -> Va5_APC_PS_L; compartment*(k58_kon*Va5_L*APC_PS_L - k58_koff*Va5_APC_PS_L);
  R59: Va3_L + APC_PS_L -> Va3_APC_PS_L; compartment*(k59_kon*Va3_L*APC_PS_L - k59_koff*Va3_APC_PS_L);
  R60: Va53_L + APC_PS_L -> Va3_APC_PS_L; compartment*(k60_kon*Va53_L*APC_PS_L - k60_koff*Va3_APC_PS_L);
  R61: Va36_L + APC_PS_L -> Va36_APC_PS_L; compartment*(k61_kon*Va36_L*APC_PS_L - k61_koff*Va36_APC_PS_L);
  R62: Va56_L + APC_PS_L -> Va56_L_APC_PS_L; compartment*(k62_kon*Va56_L*APC_PS_L - k62_koff*Va56_L_APC_PS_L);
  R63: Va536_L + APC_PS_L -> Va536_APC_PS_L; compartment*(k63_kon*Va536_L*APC_PS_L - k63_koff*Va536_APC_PS_L);
  R64: VaLC_L + APC_PS_L -> VaLC_APC_PS_L; compartment*(k64_kon*VaLC_L*APC_PS_L - k64_koff*VaLC_APC_PS_L);
  R65: VaLC_L + VaA3 -> Va3_L; compartment*(k65_kon*VaLC_L*VaA3 - k65_koff*Va3_L);
  R66: VaLC_L + VaA53 -> Va53_L; compartment*(k66_kon*VaLC_L*VaA53 - k66_koff*Va53_L);
  R67: VaLC_L + VaA36 -> Va36_L; compartment*(k67_kon*VaLC_L*VaA36 - k67_koff*Va36_L);
  R68: VaLC_L + VaA356 -> Va536_L; compartment*(k68_kon*VaLC_L*VaA356 - k68_koff*Va536_L);
  R69: VaLC_APC_PS_L + VaA3 -> Va3_APC_PS_L; compartment*(k69_kon*VaLC_APC_PS_L*VaA3 - k69_koff*Va3_APC_PS_L);
  R70: VaLC_APC_PS_L + VaA53 -> Va53_APC_PS_L; compartment*(k70_kon*VaLC_APC_PS_L*VaA53 - k70_koff*Va53_APC_PS_L);
  R71: VaLC_APC_PS_L + VaA36 -> Va36_APC_PS_L; compartment*(k71_kon*VaLC_APC_PS_L*VaA36 - k71_koff*Va36_APC_PS_L);
  R72: VaLC_APC_PS_L + VaA356 -> Va536_APC_PS_L; compartment*(k72_kon*VaLC_APC_PS_L*VaA356 - k72_koff*Va536_APC_PS_L);
  R73: Va_APC_PS_L => Va3_APC_PS_L; compartment*k73_kcat*Va_APC_PS_L;
  R74: Va5_APC_PS_L => Va53_APC_PS_L; compartment*k74_kcat*Va5_APC_PS_L;
  R75: Va5_APC_PS_L => Va56_APC_PS_L; compartment*k75_kcat*Va5_APC_PS_L;
  R76: Va3_APC_PS_L => Va36_APC_PS_L; compartment*k76_kcat*Va3_APC_PS_L;
  R77: Va53_APC_PS_L => Va536_APC_PS_L; compartment*k77_kcat*Va53_APC_PS_L;
  R78: Va56_APC_PS_L => Va536_APC_PS_L; compartment*k78_kcat*Va56_APC_PS_L;
  R79: Va_APC_PS_L => Va5_APC_PS_L; compartment*k79_kcat*Va_APC_PS_L;
  R80: Va3_APC_PS_L => Va53_APC_PS_L; compartment*k80_kcat*Va3_APC_PS_L;
  R81: Va36_APC_PS_L => Va536_APC_PS_L; compartment*k81_kcat*Va36_APC_PS_L;
  R19b: TF_VIIa_IX_L => TF_VIIa_L + IXa_L; compartment*k19_kcat*TF_VIIa_IX_L;
  R20b: TF_VIIa_X_L => TF_VIIa_Xa_L; compartment*k20_kcat*TF_VIIa_X_L;
  R22b: TF_VIIa_Xa_L => TF_VIIa_L + Xa_L; compartment*k22_kcat*TF_VIIa_Xa_L;
  R25b: IXa_VIIIa_X_L => IXa_VIIIa_L + Xa_L; compartment*k25_kcat*IXa_VIIIa_X_L;
  R26b: V_Xa_L => Va_L + Xa_L; compartment*k26_kcat*V_Xa_L;
  R27b: VIII_Xa_L => VIIIa_L + Xa_L_0; compartment*k27_kcat*VIII_Xa_L;
  R28b: V_IIa_L => Va_L + IIa; compartment*k28_kcat*V_IIa_L;
  R29b: VIII_IIa_L => VIIIa_L + IIa; compartment*k29_kcat*VIII_IIa_L;
  R34b: VII_Xa_L => VIIa_L + Xa_L; compartment*k34_kcat*VII_Xa_L;
  R35b: XI_IIa => XIa + IIa; compartment*k35_kcat*XI_IIa;
  R36b: APC_PS_VIIIa_L => APC_PS_L + VIIIa_i_L; compartment*k36_kcat*APC_PS_VIIIa_L;
  R42b: V_mIIa_L => Va_L + mIIa_L; compartment*k42_kcat*V_mIIa_L;
  R43b: VIII_mIIa_L => VIIIa_L + mIIa_L; compartment*k43_kcat*VIII_mIIa_L;
  R45b: IIa_Tm_PC_L => IIa_Tm_L + APC_L; compartment*k45_kcat*IIa_Tm_PC_L;
  R48b: XIa_IX_L => XIa + IXa_L; compartment*k48_kcat*XIa_IX_L;
  R82: Hep + IIa -> Hep_IIa; compartment*(k82_kon*Hep*IIa - k82_koff*Hep_IIa);
  R83: Hep + AT -> Hep_AT; compartment*(k83_kon*Hep*AT - k83_koff*Hep_AT);
  R84: Hep_IIa + AT -> Hep_AT_IIa; compartment*(k84_kon*Hep_IIa*AT - k84_koff*Hep_AT_IIa);
  R85: Hep_AT + IIa -> Hep_AT_IIa; compartment*(k85_kon*Hep_AT*IIa - k85_koff*Hep_AT_IIa);
  R86: IIa_AT + Hep -> Hep_AT_IIa; compartment*(k86_kon*IIa_AT*Hep - k86_koff*Hep_AT_IIa);
  R87: Hep_AT_IIa => IIa_AT; compartment*k87_cleavage*Hep_AT_IIa;

  // Unit definitions:
  unit volume = 1e-3 litre;
  unit substance = 1e-9 mole;
end
