// SBML level 2 version 4
// dcterms:bibliographicCitation: urn:miriam:pubmed:24958246

model Mitrophanov2014___Extended_Hockin_Blood_Coagulation_Model_with_additional_fibrin_associated_species()
  // Mitrophanov2014 - Extended Hockin Blood Coagulation Model with additional fibrin-associated species
  // Mathematical model of the blood coagulation cascade. Extended Hockin model with contributions from Kim2007, Naski1991, Schneider2004, Horrevoets1996, Brummel-Ziedins2012, Mitrophanov2012, Danforth2009 and Hekman1988. Model incorporates more fibrin associated species such as fibrin I and II monomers and fibrinopeptide A and B as well as factor V fragments.
  // hasPart biomodels.db:BIOMD0000000335
  // isVersionOf GO:0007596
  // occursIn BTO:0000131
  // hasTaxon taxonomy:9606
  // isDescribedBy pubmed:24958246
  // hasTaxon taxonomy:9606

  // Compartments:
  compartment compartment_1 = 1;

  // Species:
  species TF in compartment_1 = 5e-12;  // uniprot:P13726
  species TF_VII in compartment_1 = 0;  // hasPart uniprot:P08709; hasPart uniprot:P13726
  species VII in compartment_1 = 1e-8;  // uniprot:P08709
  species TF_VIIa in compartment_1 = 0;  // hasPart uniprot:P08709; hasPart uniprot:P13726
  species VIIa in compartment_1 = 1e-10;  // isVersionOf uniprot:P08709
  species Xa in compartment_1 = 0;  // isVersionOf uniprot:P00742
  species IIa in compartment_1 = 0;  // isVersionOf uniprot:P00734
  species TF_VIIa_X in compartment_1 = 0;  // hasPart uniprot:P08709; hasPart uniprot:P13726; hasPart uniprot:P00742
  species X in compartment_1 = 1.6e-7;  // uniprot:P00742
  species TF_VIIa_Xa in compartment_1 = 0;  // hasPart uniprot:P00742; hasPart uniprot:P08709; hasPart uniprot:P13726
  species IX in compartment_1 = 9e-8;  // uniprot:P00740
  species TF_VIIa_IX in compartment_1 = 0;  // hasPart uniprot:P00740; hasPart uniprot:P13726; hasPart uniprot:P08709
  species IXa in compartment_1 = 0;  // isVersionOf uniprot:P00740
  species II in compartment_1 = 1.4e-6;  // uniprot:P00734
  species VIII in compartment_1 = 7e-10;  // uniprot:P00451
  species VIIIa in compartment_1 = 0;  // isVersionOf uniprot:P00451
  species IXa_VIIIa in compartment_1 = 0;  // hasPart uniprot:P00451; hasPart uniprot:P00740
  species IXa_VIIIa_X in compartment_1 = 0;  // hasPart uniprot:P00742; hasPart uniprot:P00740; hasPart uniprot:P00451
  species VIIIa1_L in compartment_1 = 0;  // isPartOf uniprot:P00451
  species VIIIa2 in compartment_1 = 0;  // isPartOf uniprot:P00451
  species V in compartment_1 = 2e-8;  // uniprot:P12259
  species Va in compartment_1 = 0;  // isVersionOf uniprot:P12259
  species Xa_Va in compartment_1 = 0;  // hasPart uniprot:P12259; hasPart uniprot:P00742
  species Xa_Va_II in compartment_1 = 0;  // hasPart uniprot:P00742; hasPart uniprot:P12259; hasPart uniprot:P00734
  species mIIa in compartment_1 = 0;  // isVersionOf uniprot:P00734
  species TFPI in compartment_1 = 2.5e-9;  // uniprot:P10646
  species Xa_TFPI in compartment_1 = 0;  // hasPart uniprot:P10646; hasPart uniprot:P00742
  species TF_VIIa_Xa_TFPI in compartment_1 = 0;  // hasPart uniprot:P13726; hasPart uniprot:P10646; hasPart uniprot:P08709; hasPart uniprot:P00742
  species ATIII in compartment_1 = 3.4e-6;  // uniprot:P01008
  species Xa_ATIII in compartment_1 = 0;  // hasPart uniprot:P00742; hasPart uniprot:P01008
  species mIIa_ATIII in compartment_1 = 0;  // hasPart uniprot:P00734; hasPart uniprot:P01008
  species IXa_ATIII in compartment_1 = 0;  // hasPart uniprot:P00740; hasPart uniprot:P01008
  species IIa_ATIII in compartment_1 = 0;  // hasPart uniprot:P01008; hasPart uniprot:P00734
  species TF_VIIa_ATIII in compartment_1 = 0;  // hasPart uniprot:P01008; hasPart uniprot:P13726; hasPart uniprot:P08709
  species Fg in compartment_1 = 9e-6;
  species Fg_IIa in compartment_1 = 0;
  species FPA in compartment_1 = 0;
  species nI in compartment_1 = 0;
  species nI_IIa in compartment_1 = 0;
  species FPB in compartment_1 = 0;
  species nII in compartment_1 = 0;
  species nI_2 in compartment_1 = 0;
  species nI_2_IIa in compartment_1 = 0;
  species nII_IIa in compartment_1 = 0;
  species nI_2_IIa_ATIII in compartment_1 = 0;
  species nI_IIa_ATIII in compartment_1 = 0;
  species nII_IIa_ATIII in compartment_1 = 0;
  species AP in compartment_1 = 1e-6;
  species Pn in compartment_1 = 0;
  species Pn_AP in compartment_1 = 0;
  species PAI in compartment_1 = 4e-10;
  species tPA in compartment_1 = tPA_0/(a*TAFI/(1 + b*TAFI) + 1);
  species tPA_PAI in compartment_1 = 0;
  species Pg in compartment_1 = 2e-6;
  species FDP in compartment_1 = 0;
  species nII_2 in compartment_1 = 0;
  species Tm in compartment_1 = 1e-9;
  species Tm_IIa in compartment_1 = 0;
  species PC in compartment_1 = 7e-8;
  species Tm_IIa_PC in compartment_1 = 0;
  species APC in compartment_1 = 0;
  species APC_Va in compartment_1 = 0;
  species Va5 in compartment_1 = 0;
  species Va3 in compartment_1 = 0;
  species APC_Va5 in compartment_1 = 0;
  species Va53 in compartment_1 = 0;
  species APC_Va3 in compartment_1 = 0;
  species HCF in compartment_1 = 0;
  species LCA1 in compartment_1 = 0;
  species APC_LCA1 in compartment_1 = 0;
  species Tm_IIa_APC in compartment_1 = 0;
  species Xa_Va5 in compartment_1 = 0;
  species Xa_Va3 in compartment_1 = 0;
  species Xa_Va5_II in compartment_1 = 0;
  species Xa_Va3_II in compartment_1 = 0;
  species Tm_mIIa in compartment_1 = 0;
  species Tm_mIIa_PC in compartment_1 = 0;
  species Xa_Va53 in compartment_1 = 0;
  species Xa_Va53_II in compartment_1 = 0;
  species II_Va in compartment_1 = 0;
  species TAFI in compartment_1 = 7.5e-8;

  // Parameters:
  k1 = 0.0031; k1 is "k01";
  k2 = 3200000; k2 is "k02";
  k3 = 0.0031; k3 is "k03";
  k4 = 23000000; k4 is "k04";
  k5 = 440000; k5 is "k05";
  k6 = 13000000; k6 is "k06";
  k7 = 23000; k7 is "k07";
  k8 = 1.05; k8 is "k08";
  k9 = 25000000; k9 is "k09";
  k10 = 6;
  k11 = 19;
  k12 = 22000000;
  k13 = 2.4;
  k14 = 10000000;
  k15 = 1.8;
  k16 = 7500;
  k17 = 20000000;
  k18 = 0.005;
  k19 = 10000000;
  k20 = 0.001;
  k21 = 100000000;
  k22 = 8.2;
  k23 = 22000;
  k24 = 0.006;
  k25 = 0.001;
  k26 = 20000000;
  k27 = 0.2;
  k28 = 400000000;
  k29 = 103;
  k30 = 100000000;
  k31 = 63.5;
  k32 = 230000000;
  k33 = 0.00036;
  k34 = 900000;
  k35 = 0.00011;
  k36 = 320000000;
  k37 = 50000000;
  k38 = 4200;
  k39 = 7100;
  k40 = 490;
  k41 = 7100;
  k42 = 230;
  var IIa_plus_1_2mIIa; IIa_plus_1_2mIIa is "IIa+1.2mIIa";
  k43 = 5700;
  k44 = 3000000;
  k45 = 720;
  k46 = 100000000;
  k47 = 84;
  k48 = 750;
  k49 = 7.4;
  k50 = 0.064;
  k51 = 1000000;
  k52 = 750;
  k53 = 49;
  k54 = 1000;
  k55 = 16000;
  k56 = 10000;
  k57 = 3000000;
  k58 = 40000000;
  k59 = 0.09;
  k60 = 0.47;
  k61 = 0.4628;
  k62 = 80380000;
  k63 = 202.6;
  k64 = 33770000;
  k65 = 0.2545;
  k66 = 14950;
  k67 = 2.012;
  k68 = 34260000;
  k69 = 0.44;
  k70 = 0.1381;
  k71 = 0.0125;
  k72 = 0.2947;
  k73 = 23.69;
  k74 = 5.994;
  k75 = 131700000;
  k76 = 104200000;
  k77 = 0.00293;
  k78 = 210;
  k79 = 33300000;
  k80 = 1707000;
  K1 = 7.7e-8;
  K2 = 4.1e-7;
  K3 = 3e-7;
  K4 = 2.1e-6;
  tPA_0 = 7e-11;
  a = 522200000;
  b = 2676;

  // Assignment rules:
  IIa_plus_1_2mIIa := IIa + 1.2*mIIa;
  minutes := time/60;
  r3 := k60*Pn*nII_2/(K4 + nII_2);
  r2 := k60*Pn*nII/(K4 + nII);
  time_minutes := time/60;
  C_FnII := nII + 2*nII_2;
  r1 := k59*tPA*Pg*C_FnII/(K1 + C_FnII)/(Pg + K2*(K3 + C_FnII)/(K1 + C_FnII));

  // Reactions:
  R01: TF + VII -> TF_VII; compartment_1*(k2*TF*VII - k1*TF_VII);
  R02: TF + VIIa -> TF_VIIa; compartment_1*(k4*TF*VIIa - k3*TF_VIIa);
  R03: TF_VIIa + VII => TF_VIIa + VIIa; compartment_1*k5*TF_VIIa*VII;
  R04: Xa + VII => Xa + VIIa; compartment_1*k6*Xa*VII;
  R05: IIa + VII => IIa + VIIa; compartment_1*k7*IIa*VII;
  R06: TF_VIIa + X -> TF_VIIa_X; compartment_1*(k9*TF_VIIa*X - k8*TF_VIIa_X);
  R07: TF_VIIa + Xa -> TF_VIIa_Xa; compartment_1*(k12*TF_VIIa*Xa - k11*TF_VIIa_Xa);
  R08: TF_VIIa + IX -> TF_VIIa_IX; compartment_1*(k14*TF_VIIa*IX - k13*TF_VIIa_IX);
  R09: Xa + II => Xa + IIa; compartment_1*k16*Xa*II;
  R10: IIa + VIII => IIa + VIIIa; compartment_1*k17*IIa*VIII;
  R11: IXa + VIIIa -> IXa_VIIIa; compartment_1*(k19*IXa*VIIIa - k18*IXa_VIIIa);
  R12: IXa_VIIIa + X -> IXa_VIIIa_X; compartment_1*(k21*IXa_VIIIa*X - k20*IXa_VIIIa_X);
  R13: VIIIa -> VIIIa1_L + VIIIa2; compartment_1*(k24*VIIIa - k23*VIIIa1_L*VIIIa2);
  R14: IXa_VIIIa_X => VIIIa1_L + VIIIa2 + X + IXa; compartment_1*k25*IXa_VIIIa_X;
  R15: IXa_VIIIa => VIIIa1_L + VIIIa2 + IXa; compartment_1*k25*IXa_VIIIa;
  R16: IIa + V => IIa + Va; compartment_1*k26*IIa*V;
  R17: Xa + Va -> Xa_Va; compartment_1*(k28*Xa*Va - k27*Xa_Va);
  R18: Xa_Va + II -> Xa_Va_II; compartment_1*(k30*Xa_Va*II - k29*Xa_Va_II);
  R19: mIIa + Xa_Va => IIa + Xa_Va; compartment_1*k32*mIIa*Xa_Va;
  R20: Xa + TFPI -> Xa_TFPI; compartment_1*(k34*Xa*TFPI - k33*Xa_TFPI);
  R21: TF_VIIa_Xa + TFPI -> TF_VIIa_Xa_TFPI; compartment_1*(k36*TF_VIIa_Xa*TFPI - k35*TF_VIIa_Xa_TFPI);
  R22: TF_VIIa + Xa_TFPI => TF_VIIa_Xa_TFPI; compartment_1*k37*TF_VIIa*Xa_TFPI;
  R23: Xa + ATIII => Xa_ATIII; compartment_1*k38*Xa*ATIII;
  R24: mIIa + ATIII => mIIa_ATIII; compartment_1*k39*mIIa*ATIII;
  R25: IXa + ATIII => IXa_ATIII; compartment_1*k40*IXa*ATIII;
  R26: IIa + ATIII => IIa_ATIII; compartment_1*k41*IIa*ATIII;
  R27: TF_VIIa + ATIII => TF_VIIa_ATIII; compartment_1*k42*TF_VIIa*ATIII;
  R6b: TF_VIIa_X => TF_VIIa_Xa; compartment_1*k10*TF_VIIa_X; R6b is "R06b";
  R8b: TF_VIIa_IX => TF_VIIa + IXa; compartment_1*k15*TF_VIIa_IX; R8b is "R08b";
  R12b: IXa_VIIIa_X => IXa_VIIIa + Xa; compartment_1*k22*IXa_VIIIa_X;
  R18b: Xa_Va_II => Xa_Va + mIIa; compartment_1*k31*Xa_Va_II;
  R28: IXa + X => IXa + Xa; compartment_1*k43*IXa*X;
  R29: mIIa + V => mIIa + Va; compartment_1*k44*mIIa*V;
  R30: Fg + IIa -> Fg_IIa; compartment_1*(k46*Fg*IIa - k45*Fg_IIa);
  R30b: Fg_IIa => nI + IIa + FPA; compartment_1*k47*Fg_IIa;
  R31: nI + IIa -> nI_IIa; compartment_1*(k46*nI*IIa - k48*nI_IIa);
  R31b: nI_IIa => nII + IIa + FPB; compartment_1*k49*nI_IIa;
  R32: 2 nI -> nI_2; compartment_1*(k46*nI^2 - k52*nI_2);
  R33: nI_2 + IIa -> nI_2_IIa; compartment_1*(k46*nI_2*IIa - k52*nI_2_IIa);
  R33b: nI_2_IIa => nI_2 + IIa + 2 FPB; compartment_1*k53*nI_2_IIa;
  R34: nII + IIa -> nII_IIa; compartment_1*(k46*nII*IIa - k54*nII_IIa);
  R35: nI_2_IIa + ATIII => nI_2_IIa_ATIII; compartment_1*k55*nI_2_IIa*ATIII;
  R36: nI_IIa + ATIII => nI_IIa_ATIII; compartment_1*k55*nI_IIa*ATIII;
  R37: nII_IIa + ATIII => nII_IIa_ATIII; compartment_1*k56*nII_IIa*ATIII;
  R38: Pn + AP => Pn_AP; compartment_1*k57*Pn*AP;
  R39: tPA + PAI => tPA_PAI; compartment_1*k58*tPA*PAI;
  R40: Pg => Pn; compartment_1*r1*Pg;
  R41: nII => FDP; compartment_1*r2*nII;
  R42: nII_2 => 2 FDP; compartment_1*r3*nII_2;
  R43: Tm + IIa -> Tm_IIa; compartment_1*(k62*Tm*IIa - k61*Tm_IIa);
  R44: Tm_IIa + PC -> Tm_IIa_PC; compartment_1*(k64*Tm_IIa*PC - k63*Tm_IIa_PC);
  R44b: Tm_IIa_PC => Tm_IIa + APC; compartment_1*k65*Tm_IIa_PC;
  R45: Tm_IIa + ATIII => IIa_ATIII + Tm; compartment_1*k66*Tm_IIa*ATIII;
  R46: APC + Va -> APC_Va; compartment_1*(k68*APC*Va - k67*APC_Va);
  R47: APC_Va => APC + Va5; compartment_1*k69*APC_Va;
  R48: APC_Va => APC + Va3; compartment_1*k70*APC_Va;
  R49: APC + Va5 -> APC_Va5; compartment_1*(k68*APC*Va5 - k67*APC_Va5);
  R49b: APC_Va5 => APC + Va53; compartment_1*k70*APC_Va5;
  R50: APC + Va3 -> APC_Va3; compartment_1*(k68*APC*Va3 - k67*APC_Va3);
  R50b: APC_Va3 => APC + Va53; compartment_1*k69*APC_Va3;
  R51: Va3 => HCF + LCA1; compartment_1*k71*Va3;
  R52: Va53 => HCF + LCA1; compartment_1*k71*Va53;
  R53: APC + LCA1 -> APC_LCA1; compartment_1*(k68*APC*LCA1 - k67*APC_LCA1);
  R54: APC + Tm_IIa -> Tm_IIa_APC; compartment_1*(k64*APC*Tm_IIa - k63*Tm_IIa_APC);
  R55: Xa + Va5 -> Xa_Va5; compartment_1*(k28*Xa*Va5 - k72*Xa_Va5);
  R56: Xa + Va3 -> Xa_Va3; compartment_1*(k28*Xa*Va3 - k72*Xa_Va3);
  R57: Xa_Va5 + II -> Xa_Va5_II; compartment_1*(k30*Xa_Va5*II - k29*Xa_Va5_II);
  R57b: Xa_Va5_II => Xa_Va5 + mIIa; compartment_1*k73*Xa_Va5_II;
  R58: Xa_Va3 + II -> Xa_Va3_II; compartment_1*(k30*Xa_Va3*II - k29*Xa_Va3_II);
  R58b: Xa_Va3_II => Xa_Va3 + mIIa; compartment_1*k74*Xa_Va3_II;
  R59: Xa_Va5 + mIIa => Xa_Va5 + IIa; compartment_1*k75*Xa_Va5*mIIa;
  R60: Xa_Va3 + mIIa => Xa_Va3 + IIa; compartment_1*k76*Xa_Va3*mIIa;
  R61: Xa_Va3 => HCF + LCA1 + Xa; compartment_1*k77*Xa_Va3;
  R62: Xa_Va3_II => HCF + LCA1 + Xa + II; compartment_1*k77*Xa_Va3_II;
  R63: Tm + mIIa -> Tm_mIIa; compartment_1*(k62*Tm*mIIa - k61*Tm_mIIa);
  R64: Tm_mIIa + PC -> Tm_mIIa_PC; compartment_1*(k64*Tm_mIIa*PC - k63*Tm_mIIa_PC);
  R64b: Tm_mIIa_PC => Tm_mIIa + APC; compartment_1*k65*Tm_mIIa_PC;
  R65: Tm_mIIa + ATIII => mIIa_ATIII + Tm; compartment_1*k66*Tm_mIIa*ATIII;
  R66: Xa + Va53 -> Xa_Va53; compartment_1*(k28*Xa*Va53 - k72*Xa_Va53);
  R67: Xa_Va53 + II -> Xa_Va53_II; compartment_1*(k30*Xa_Va53*II - k29*Xa_Va53_II);
  R67b: Xa_Va53_II => Xa_Va53 + mIIa; compartment_1*k74*Xa_Va53_II;
  R68: Xa_Va53 + mIIa => Xa_Va53 + IIa; compartment_1*k76*Xa_Va53*mIIa;
  R69: Xa_Va53 => HCF + LCA1 + Xa; compartment_1*k77*Xa_Va53;
  R70: Xa_Va53_II => HCF + LCA1 + Xa + II; compartment_1*k77*Xa_Va53_II;
  R71: II + Va -> II_Va; compartment_1*(k79*II*Va - k78*II_Va);
  R72: Xa_Va5 + APC => Xa_Va53 + APC; compartment_1*k80*Xa_Va5*APC;
end
